// SBML level 3 version 2

model networkODE()

  // Parameters:
  DBP = 1;
  ROR = 1;
  BMAL1 = 1;
  NFIL3 = 1;
  REV_ERB = 1;
  PER = 1;
  CRY = 1;
  AMPK = 1;
  FBXL3 = 1;
  FBXL21 = 1;
  CREB = 1;
  TGF_beta = 1;
  COL2A = 1;
  COL1A = 1;
  ACAN = 1;
  TGFBRI = 1;
  IGF1 = 1;
  IGF1R = 1;
  GDF5 = 1;
  IL_10 = 1;
  IL_10R1 = 1;
  IL_4 = 1;
  IL_4R = 1;
  IL_1beta = 1;
  IL_1R1 = 1;
  IL_6 = 1;
  IL_6R = 1;
  IL_17 = 1;
  IL_17R = 1;
  IL_1RA = 1;
  IFN_gamma = 1;
  IFN_gammaR = 1;
  TNF = 1;
  TNFR1 = 1;
  ADAMTS4_5 = 1;
  MMP13 = 1;
  MMP3 = 1;
  VEGF = 1;
  iNos = 1;
  Cox2 = 1;
  CCL3_4 = 1;
  TIMP3 = 1;
  CCN2 = 1;
  NF_kB = 1;
  p65 = 1;
  IkBalpha = 1;
  ERK = 1;
  cJun = 1;
  JNK = 1;
  p38 = 1;
  akt1 = 1;
  Sox9 = 1;
  JAK = 1;
  STAT1 = 1;
  STAT3 = 1;
  STAT4 = 1;
  STAT6 = 1;
  SMAD2_3 = 1;
  SMAD1_5_8_4 = 1;
  wnt5a = 1;
  beta_catenin = 1;

  // Rate rules:
  DBP' = BMAL1/(1 + BMAL1)/(1 + BMAL1/(1 + BMAL1))*1 - DBP;
  ROR' = (DBP/(1 + DBP) + NFIL3/(1 + NFIL3))/(1 + DBP/(1 + DBP) + NFIL3/(1 + NFIL3))*1 - ROR;
  BMAL1' = (ROR/(1 + ROR) + TGF_beta/(1 + TGF_beta) + IL_1RA/(1 + IL_1RA))/(1 + ROR/(1 + ROR) + TGF_beta/(1 + TGF_beta) + IL_1RA/(1 + IL_1RA))*(1 - REV_ERB/(1 + REV_ERB) + (1 - PER/(1 + PER)) + (1 - CRY/(1 + CRY)) + (1 - NF_kB/(1 + NF_kB))) - BMAL1;
  NFIL3' = ROR/(1 + ROR)/(1 + ROR/(1 + ROR))*1 - NFIL3;
  REV_ERB' = (BMAL1/(1 + BMAL1) + IL_1RA/(1 + IL_1RA))/(1 + BMAL1/(1 + BMAL1) + IL_1RA/(1 + IL_1RA))*(1 - NF_kB/(1 + NF_kB)) - REV_ERB;
  PER' = (BMAL1/(1 + BMAL1) + CREB/(1 + CREB) + IL_1RA/(1 + IL_1RA))/(1 + BMAL1/(1 + BMAL1) + CREB/(1 + CREB) + IL_1RA/(1 + IL_1RA))*(1 - NF_kB/(1 + NF_kB)) - PER;
  CRY' = BMAL1/(1 + BMAL1)/(1 + BMAL1/(1 + BMAL1))*(1 - AMPK/(1 + AMPK) + (1 - FBXL21/(1 + FBXL21))) - CRY;
  AMPK' = FBXL3/(1 + FBXL3)/(1 + FBXL3/(1 + FBXL3))*1 - AMPK;
  FBXL3' = 0*(1 - FBXL21/(1 + FBXL21)) - FBXL3;
  FBXL21' = 0*1 - FBXL21;
  CREB' = (p38/(1 + p38) + akt1/(1 + akt1))/(1 + p38/(1 + p38) + akt1/(1 + akt1))*1 - CREB;
  TGF_beta' = (cJun/(1 + cJun) + beta_catenin/(1 + beta_catenin))/(1 + cJun/(1 + cJun) + beta_catenin/(1 + beta_catenin))*1 - TGF_beta;
  COL2A' = (TGF_beta/(1 + TGF_beta) + GDF5/(1 + GDF5) + IL_1RA/(1 + IL_1RA) + cJun/(1 + cJun))/(1 + TGF_beta/(1 + TGF_beta) + GDF5/(1 + GDF5) + IL_1RA/(1 + IL_1RA) + cJun/(1 + cJun))*(1 - TNF/(1 + TNF)) - COL2A;
  COL1A' = IL_1RA/(1 + IL_1RA)/(1 + IL_1RA/(1 + IL_1RA))*(1 - cJun/(1 + cJun)) - COL1A;
  ACAN' = (TGF_beta/(1 + TGF_beta) + GDF5/(1 + GDF5) + IL_1RA/(1 + IL_1RA) + cJun/(1 + cJun) + Sox9/(1 + Sox9))/(1 + TGF_beta/(1 + TGF_beta) + GDF5/(1 + GDF5) + IL_1RA/(1 + IL_1RA) + cJun/(1 + cJun) + Sox9/(1 + Sox9))*(1 - TNF/(1 + TNF)) - ACAN;
  TGFBRI' = (TGF_beta/(1 + TGF_beta) + cJun/(1 + cJun))/(1 + TGF_beta/(1 + TGF_beta) + cJun/(1 + cJun))*1 - TGFBRI;
  IGF1' = (MMP13/(1 + MMP13) + MMP3/(1 + MMP3))/(1 + MMP13/(1 + MMP13) + MMP3/(1 + MMP3))*1 - IGF1;
  IGF1R' = IGF1/(1 + IGF1)/(1 + IGF1/(1 + IGF1))*1 - IGF1R;
  GDF5' = TGF_beta/(1 + TGF_beta)/(1 + TGF_beta/(1 + TGF_beta))*1 - GDF5;
  IL_10' = 0*1 - IL_10;
  IL_10R1' = IL_10/(1 + IL_10)/(1 + IL_10/(1 + IL_10))*1 - IL_10R1;
  IL_4' = 0*1 - IL_4;
  IL_4R' = IL_4/(1 + IL_4)/(1 + IL_4/(1 + IL_4))*1 - IL_4R;
  IL_1beta' = 0*(1 - cJun/(1 + cJun)) - IL_1beta;
  IL_1R1' = (IL_1beta/(1 + IL_1beta) + cJun/(1 + cJun) + JNK/(1 + JNK) + p38/(1 + p38))/(1 + IL_1beta/(1 + IL_1beta) + cJun/(1 + cJun) + JNK/(1 + JNK) + p38/(1 + p38))*1 - IL_1R1;
  IL_6' = TGF_beta/(1 + TGF_beta)/(1 + TGF_beta/(1 + TGF_beta))*(1 - cJun/(1 + cJun)) - IL_6;
  IL_6R' = IL_6/(1 + IL_6)/(1 + IL_6/(1 + IL_6))*1 - IL_6R;
  IL_17' = 0*(1 - cJun/(1 + cJun)) - IL_17;
  IL_17R' = (IL_17/(1 + IL_17) + TNFR1/(1 + TNFR1))/(1 + IL_17/(1 + IL_17) + TNFR1/(1 + TNFR1))*(1 - cJun/(1 + cJun)) - IL_17R;
  IL_1RA' = 0*1 - IL_1RA;
  IFN_gamma' = 0*1 - IFN_gamma;
  IFN_gammaR' = IFN_gamma/(1 + IFN_gamma)/(1 + IFN_gamma/(1 + IFN_gamma))*1 - IFN_gammaR;
  TNF' = 0*(1 - IL_1RA/(1 + IL_1RA) + (1 - cJun/(1 + cJun))) - TNF;
  TNFR1' = TNF/(1 + TNF)/(1 + TNF/(1 + TNF))*(1 - cJun/(1 + cJun) + (1 - wnt5a/(1 + wnt5a))) - TNFR1;
  ADAMTS4_5' = (NF_kB/(1 + NF_kB) + p65/(1 + p65) + cJun/(1 + cJun))/(1 + NF_kB/(1 + NF_kB) + p65/(1 + p65) + cJun/(1 + cJun))*(1 - IL_1RA/(1 + IL_1RA)) - ADAMTS4_5;
  MMP13' = NF_kB/(1 + NF_kB)/(1 + NF_kB/(1 + NF_kB))*(1 - IL_1RA/(1 + IL_1RA) + (1 - JNK/(1 + JNK)) + (1 - akt1/(1 + akt1)) + (1 - wnt5a/(1 + wnt5a))) - MMP13;
  MMP3' = (cJun/(1 + cJun) + p38/(1 + p38))/(1 + cJun/(1 + cJun) + p38/(1 + p38))*(1 - IL_1RA/(1 + IL_1RA) + (1 - akt1/(1 + akt1)) + (1 - wnt5a/(1 + wnt5a))) - MMP3;
  VEGF' = STAT3/(1 + STAT3)/(1 + STAT3/(1 + STAT3))*1 - VEGF;
  iNos' = STAT3/(1 + STAT3)/(1 + STAT3/(1 + STAT3))*(1 - IL_1RA/(1 + IL_1RA)) - iNos;
  Cox2' = 0*(1 - IL_1RA/(1 + IL_1RA)) - Cox2;
  CCL3_4' = (IL_1beta/(1 + IL_1beta) + ERK/(1 + ERK))/(1 + IL_1beta/(1 + IL_1beta) + ERK/(1 + ERK))*(1 - TGF_beta/(1 + TGF_beta)) - CCL3_4;
  TIMP3' = (cJun/(1 + cJun) + SMAD2_3/(1 + SMAD2_3))/(1 + cJun/(1 + cJun) + SMAD2_3/(1 + SMAD2_3))*1 - TIMP3;
  CCN2' = TGF_beta/(1 + TGF_beta)/(1 + TGF_beta/(1 + TGF_beta))*1 - CCN2;
  NF_kB' = (TNF/(1 + TNF) + IkBalpha/(1 + IkBalpha))/(1 + TNF/(1 + TNF) + IkBalpha/(1 + IkBalpha))*(1 - TGF_beta/(1 + TGF_beta) + (1 - wnt5a/(1 + wnt5a))) - NF_kB;
  p65' = (IL_1R1/(1 + IL_1R1) + TNFR1/(1 + TNFR1))/(1 + IL_1R1/(1 + IL_1R1) + TNFR1/(1 + TNFR1))*(1 - wnt5a/(1 + wnt5a)) - p65;
  IkBalpha' = IL_1R1/(1 + IL_1R1)/(1 + IL_1R1/(1 + IL_1R1))*1 - IkBalpha;
  ERK' = (TGFBRI/(1 + TGFBRI) + IGF1R/(1 + IGF1R) + IL_1R1/(1 + IL_1R1) + TNFR1/(1 + TNFR1) + JNK/(1 + JNK))/(1 + TGFBRI/(1 + TGFBRI) + IGF1R/(1 + IGF1R) + IL_1R1/(1 + IL_1R1) + TNFR1/(1 + TNFR1) + JNK/(1 + JNK))*1 - ERK;
  cJun' = (IL_1R1/(1 + IL_1R1) + IL_17R/(1 + IL_17R) + TNFR1/(1 + TNFR1))/(1 + IL_1R1/(1 + IL_1R1) + IL_17R/(1 + IL_17R) + TNFR1/(1 + TNFR1))*1 - cJun;
  JNK' = TNF/(1 + TNF)/(1 + TNF/(1 + TNF))*1 - JNK;
  p38' = (IL_1R1/(1 + IL_1R1) + IL_17R/(1 + IL_17R) + TNF/(1 + TNF) + TNFR1/(1 + TNFR1))/(1 + IL_1R1/(1 + IL_1R1) + IL_17R/(1 + IL_17R) + TNF/(1 + TNF) + TNFR1/(1 + TNFR1))*(1 - IL_10R1/(1 + IL_10R1)) - p38;
  akt1' = (TGF_beta/(1 + TGF_beta) + IGF1R/(1 + IGF1R))/(1 + TGF_beta/(1 + TGF_beta) + IGF1R/(1 + IGF1R))*(1 - IL_1R1/(1 + IL_1R1)) - akt1;
  Sox9' = (TGFBRI/(1 + TGFBRI) + akt1/(1 + akt1))/(1 + TGFBRI/(1 + TGFBRI) + akt1/(1 + akt1))*1 - Sox9;
  JAK' = 0*1 - JAK;
  STAT1' = IFN_gammaR/(1 + IFN_gammaR)/(1 + IFN_gammaR/(1 + IFN_gammaR))*1 - STAT1;
  STAT3' = 0*(1 - IL_1R1/(1 + IL_1R1)) - STAT3;
  STAT4' = 0*1 - STAT4;
  STAT6' = JAK/(1 + JAK)/(1 + JAK/(1 + JAK))*1 - STAT6;
  SMAD2_3' = (TGFBRI/(1 + TGFBRI) + ERK/(1 + ERK))/(1 + TGFBRI/(1 + TGFBRI) + ERK/(1 + ERK))*1 - SMAD2_3;
  SMAD1_5_8_4' = 0*1 - SMAD1_5_8_4;
  wnt5a' = TNFR1/(1 + TNFR1)/(1 + TNFR1/(1 + TNFR1))*(1 - TGF_beta/(1 + TGF_beta) + (1 - GDF5/(1 + GDF5))) - wnt5a;
  beta_catenin' = wnt5a/(1 + wnt5a)/(1 + wnt5a/(1 + wnt5a))*1 - beta_catenin;
end
